// SBML level 3 version 1

model FAMoS_2019()

  // Compartments:
  compartment Compartment = 1;

  // Species:
  species A in Compartment = 100/Compartment;
  species B in Compartment = 0;
  species C in Compartment = 0;
  species D in Compartment = 0;

  // Parameters:
  ro_A = 0;
  ro_B = 0.1;
  ro_C = 0.1;
  ro_D = 0;
  mu_AB = 0.1;
  mu_BA = 0;
  mu_AC = 0;
  mu_CA = 0;
  mu_AD = 0;
  mu_DA = 0;
  mu_BC = 0.05;
  mu_CB = 0;
  mu_BD = 0.2;
  mu_DB = 0;
  mu_CD = 0;
  mu_DC = 0;

  // Rate rules:
  A' = mu_BA*B + mu_CA*C + mu_DA*D + ro_A*A - mu_AB*A - mu_AC*A - mu_AD*A;
  B' = mu_AB*A + mu_CB*C + mu_DB*D + ro_B*B - mu_BA*B - mu_BC*B - mu_BD*B;
  C' = mu_AC*A + mu_BC*B + mu_DC*D + ro_C*C - mu_CA*C - mu_CB*C - mu_CD*C;
  D' = mu_AD*A + mu_BD*B + mu_CD*C + ro_D*D - mu_DA*D - mu_DB*D - mu_DC*D;
end
